// COMSOL Multiphysics 5.1.0.234 model "Proyecto_final_Optica.mph"
// FinalOpticaJavi
// Outline of the model tree

Geometry
  geom1 "Geometry 1" (2D, length unit µm)
    r1: Rectangle | pos = {0, 0}; type = solid; base = center; size = {1, .7}
    arr1: Array | input = r1; size = {3, 1}; fullsize = {3, 1}; displ = {1, 0}
    c1: Circle | pos = {.9, .1}; type = solid; base = center; r = .1
    mov1: Move "Mover 1" | input = c1; keep = on; displx = .2
    pol1: Polygon "Polígono 1" | x = .8,1,1.2; y = .1,-.15,.1
    uni1: Union "Unión 1" | input = c1, mov1, pol1
    del1: Delete "Suprimir entidades 1" | input = uni1(1) domains 1, 7
    del2: Delete "Suprimir entidades 2" | input = del1(1) boundaries 2, 5, 8, 9, 11, 13
    fin: Finalize "Form Union"

Materials
  mat1: Common "Aire" on domains 1, 3, 4
    def "Basic"
      relpermeability = 1
      relpermittivity = 1
      dynamicviscosity = eta(T[1/K])[Pa*s]
      ratioofspecificheat = 1.4
      electricconductivity = 0[S/m]
      heatcapacity = Cp(T[1/K])[J/(kg*K)]
      density = rho(pA[1/Pa],T[1/K])[kg/m^3]
      thermalconductivity = k(T[1/K])[W/(m*K)]
      soundspeed = cs(T[1/K])[m/s]
      eta: Piecewise | arg = T; extrap = constant; pieces = {200.0, 1600.0, -8.38278E-7+8.35717342E-8*T^1-7.69429583E-11*T^2+4.6437266E-14*T^3-1.06585607E-17*T^4}
      Cp: Piecewise | arg = T; extrap = constant; pieces = {200.0, 1600.0, 1047.63657-0.372589265*T^1+9.45304214E-4*T^2-6.02409443E-7*T^3+1.2858961E-10*T^4}
      rho: Analytic | expr = pA*0.02897/8.314/T; args = {pA, T}; dermethod = manual; argders = {{pA, d(pA*0.02897/8.314/T,pA)}, {T, d(pA*0.02897/8.314/T,T)}}
      k: Piecewise | arg = T; extrap = constant; pieces = {200.0, 1600.0, -0.00227583562+1.15480022E-4*T^1-7.90252856E-8*T^2+4.11702505E-11*T^3-7.43864331E-15*T^4}
      cs: Analytic | expr = sqrt(1.4*287*T); args = T; dermethod = manual; argders = {T, d(sqrt(1.4*287*T),T)}
    RefractiveIndex
      n = 1
      ki = 0
  mat2: Common "Metamaterial(ZIM)" on domains 2
    def "Basic"
      relpermittivity = .0000001
      relpermeability = .0000001

Physics
  ewfd: ElectromagneticWavesFrequencyDomain on domains 1-4
    dependent variable E = {Ex, Ey, Ez}
    wee1: WaveEquationElectric "Región 1, 2 y 3" (default) | materialType = from_mat
    pec1: PerfectElectricConductor (default)
    init1: init "Valores iniciales de campo" (default)
    wee2: WaveEquationElectric "Región 1" on domains 2
      DisplacementFieldModel = DrudeLorentzDispersionModel
      omegap = 4.18e14
    pmc1: PerfectMagneticConductor "Paredes y contorno PMC" on boundaries 2, 3, 5-10, 12, 13, 15-18
    port1: Port "Campo incidente" on boundaries 1
      PortExcitation = on
      Pin = .0000155[W]
      PortType = Rectangular
      beta = 1.74e6
      E0 = {0, 0, 1}
    port2: Port "Salida" on boundaries 14 | PortType = Rectangular

Mesh
  mesh1 "Mesh 1" (physics-controlled)
    size: MeshSizeDefault | hauto = 1

Studies
  std1 "Study 1"
    freq: Frequency "Frequency Domain" | punit = Hz; plist = 1.515e15

Solver configurations
  sol1 "Solution 1" (study std1)
    v1: Variables "Variables dependientes 1"
    s1: Stationary "Resolvedor estacionario 1"
      dDef: Direct "Directo"
      p1: Parametric "Paramétrico 1" | pname = freq; plistarr = 1.515e15; punit = Hz; pcontinuationmode = no
      fc1: FullyCoupled "Completamente acoplado 1" | linsolver = dDef

Datasets
  dset1: Solution | solution = sol1

Plots
  pg1: PlotGroup2D "Electric Field (ewfd)" | data = dset1; xlabel = x; ylabel = y; axistrailingzeros = off
    surf1: Surface "Campo eléctrico"
      data = dset1
      expr = ewfd.Ez
      typeintitle = off
      descriptionintitle = off
      unitintitle = on
      prefixintitle = Campo eléctrico a lo largo de la guía
      wireframe = off